# Μέρος Α. Σχεδίαση Φίλτρου με Απόκριση ButterWorth
# Εργαστήριο Ηλεκτρονικών Φίλτρων
# Τελικό Project
# Ημερομηνία Παράδοσης: 16/1/2014
# Ονοματεπώνυμο: Λαζαρίδης Νίκος
# Α.Μ.: 41061
# Α.1 | Προσέγγιση ButterWorth
# Eπιλέγω β=β.max και H.o=1
a_max := 1.5
H_o := 1
n := 3
k := 1 .. n
β := sqrt(10^(a_max/10) - 1)
s_k(k) := nthroot(1/β, n)*e^(1i*((2*k + 1)*π/(2*n) + π/2))
s_k(k) = [-1.15902; -0.579508 - 1.00374i; 0.579508 - 1.00374i]
H_BUT(s) := H_o/β/product(s - s_k(k), k = 0 .. n - 1) → 1.55693/((s + 0.57951 - 1.00374i)*(s + 0.57951 + 1.00374i)*(s + 1.15902))
# A.3
# Η Κανονικοποιημένη Συνάρτηση Μεταφοράς της Προσσέγγισης Butterworth απλοποιείται σε:
H_Butterworth(s) := 1.55693/(s^3 + s^2*2.31804 + s*2.68663 + 1.55693)
# Συνάρτηση Μεταφοράς του Κανονικοποιημένου Κυκλώματος
# "Σπάω" τη συνάρτηση μεταφοράς της προσέγγισης σε δύο μέρη:
H_B(s) := A_1/(s + 1.15902)*A_2/(s^2 + s*1.15902 + 1.3433)  # error: This variable is undefined.
# Όπου θα πρέπει:
A_1*A_2 := 1.55693  # error: A name is required here.
# Για:
R_o := 1
# βρίσκω από το κύκλωμα RC της πρώτης βαθμίδας ότι:
C_o1 := 0.8628
# Συνάρτηση Μεταφοράς 1ης Βαθμίδας RC:
H_B1(s) := 1/(R_o*C_o1)/(s + 1/(R_o*C_o1)) → 1.15902/(s + 1.15902)
A_1 := 1.15902
# Συνάρτηση Μεταφοράς 2ης Βαθμίδας, Αντιστρεπτικού Τ.Ε. Μοναδιαίου Κέρδους:
H_B2(s) := -R_o/R_o → -1
# Συνάρτηση Μεταφοράς 3ης Βαθμίδας, Αντιστρεπτικού Τ.Ε.:
H_B3(s) := -R_o/(2*R_o) → -1/2
# Συνάρτηση μεταφοράς 4ης Βαθμίδας, Βαθυπερατού Κυκλώματος Sallen-Key σύμφωνα με
# τη Σχεδίαση ΙΙ:
# Από την ανάλυση με βάση τη σχεδίαση ΙΙ και για:
R_o := 1
# και
k_b := 2
# παίρνω:
C_o2 := 0.86281
H_B4(s) := k_b/(R_o^2*C_o2^2)/(s^2 + s*((3 - k)/(R_o*C_o2)) + 1/(R_o^2*C_o2^2)) → 2.68658/(s^2 - s*(1.159*(1 .. 3) - 3.47701) + 1.34329)
A_2 := 2.6866
# Συνάρτηση Μεταφοράς του Συνολικού Κανονικοποιημένου Κυκλώματος:
H_BUTcircuit(s) := 1/(R_o*C_o1)/(s + 1/(R_o*C_o1))*(-R_o/R_o)*(-R_o/(2*R_o))*k_b/(R_o^2*C_o2^2)/(s^2 + s*((3 - k_b)/(R_o*C_o2)) + 1/(R_o^2*C_o2^2)) → 1.5569/((s + 1.15902)*(1.159*s + s^2 + 1.34329))
# Πρόσθεσα τη Δεύτερη και τη Τρίτη βαθμίδα ώστε οι συναρτήσεις μεταφοράς της προσέγγισης και του κυκλώματος να έχουν και ίσους αριθμητές.
# Εναλλακτικά:
ω_ob1 := 1.15902
ω_ob2 := 1.15901
Q_b := 1
P_ButterworthCircuit(s) := ω_ob1/(s + ω_ob1)*(-R_o/R_o)*(-R_o/(2*R_o))*k_b*ω_ob2^2/(s^2 + s*ω_ob2/Q_b + ω_ob2^2) → 1.55692/((s + 1.15902)*(1.15901*s + s^2 + 1.3433))
Ω := 0, 0.001 .. 5
# Καμπύλη Λογαριθμικού Κέρδους της Κανονικοποιημένης Συνάρτησης Μεταφοράς Butterworth και
# του Κανονικοποιημένου Κυκλώματος
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# A.4 | Αποκανονικοποίηση Κυκλώματος Φίλτρου Butterworth
R_n := 10^4
a := 6
f_c := (1 + 0.1*a)*10^3 = 1600
ω_c := 2*π*f_c = 10053.1
R_B := R_o*R_n = 10000
C_B1 := C_o1/(ω_c*R_n) = 8.58243e-9
C_B2 := C_o2/(ω_c*R_n) = 8.58253e-9
# Επίσης επιλέγω:
R_b := 10^4
# και
R_a := 3*R_b = 30000
# Συνάρτηση Μεταφοράς Αποκανονικοποιημένου Κυκλώματος
H_ButterworthFilter(s) := 1/(R_B*C_B1)/(s + 1/(R_B*C_B1))*(-R_B/R_B)*(-R_B/(2*R_B))*k_b/(R_B^2*C_B2^2)/(s^2 + s*((3 - k_b)/(R_B*C_B2)) + 1/(R_B^2*C_B2^2)) → 1.58183*10^12/((s + 1.16517*10^4)*(1.16516*10^4*s + s^2 + 1.35759*10^8))
f := 1, 10 .. 1000000
# Καμπύλη Λογαριθμικού Κέρδους του Αποκανονικοποιημένου Κυκλώματος
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# Προσομείωση Κυκλώματος Φίλτρου Butterworth στο PsPice
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# Καμπύλη Λογαριθμικού Κέρδους Αποκανονικοποιημένου Κυκλώματος Φίλτρου Butterworth στο PsPice
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# Μέρος Β. Σχεδίαση Φίλτρου με Προσέγγιση Chebyshev
# Β.1 | Επιλέγω ε=ε.max και Ho:=1. Επίσης n:=3 και amax:=1.5
C_n := 4
ε := sqrt(10^(a_max/10) - 1) = 0.642291
k := 1 .. n
s_p(k) := sin((2*n + 2*k - 1)*π/(2*n))*sinh(1/n*asinh(1/ε)) + 1i*(cos((2*n + 2*k - 1)*π/(2*n))*cosh(1/n*asinh(1/ε)))
s_p(k) = [-0.210056 - 0.939346i; -0.420112; -0.210056 + 0.939346i]
H_CHEB(s) := H_o/(ε*C_n*product(s - s_p(k), k = 1 .. n)) → 0.38923/((s + 0.21006 - 0.93935i)*(s + 0.21006 + 0.93935i)*(s + 0.42011))
# Η Κανονικοποιημένη Συνάρτηση Μεταφοράς της Προσσέγγισης Butterworth απλοποιείται σε:
H_Chebyshev(s) := 0.38923/(s^3 + s^2*0.84023 + s*1.10299 + 0.38923)
# Συνάρτηση Μεταφοράς του Κανονικοποιημένου Κυκλώματος Φίλτρου Chebyshev
# "Σπάω" τη συνάρτηση μεταφοράς της προσέγγισης σε δύο μέρη:
H_C(s) := B_1/(s + 0.42011)*B_2/(s^2 + s*0.42012 + 0.92651)  # error: This variable is undefined.
# Όπου θα πρέπει:
B_1*B_2 := 0.38923  # error: A name is required here.
# Για:
R_c := 1
# βρίσκω από το κύκλωμα RC της πρώτης βαθμίδας ότι:
C_c1 := 2.38033
# Συνάρτηση Μεταφοράς 1ης Βαθμίδας RC:
H_C1(s) := 1/(R_c*C_c1)/(s + 1/(R_c*C_c1)) → 0.42011/(s + 0.42011)
B_1 := 0.42011
# Συνάρτηση Μεταφοράς 2ης Βαθμίδας, Αντιστρεπτικού Τ.Ε. Μοναδιαίου Κέρδους:
H_C2(s) := -R_c/R_c → -1
# Συνάρτηση Μεταφοράς 3ης Βαθμίδας, Αντιστρεπτικού Τ.Ε.:
H_C3(s) := -0.74999*R_c/R_c → -0.74999
# Η τιμή του παραπάνω κανονικοποιημένου αντιστάτη επιλέχθηκε κατάλληλα ώστε να εξισωθεί
# η τιμή του αριθμητή της συνάρτησης μεταφοράς του κανονικοποιημένου κυκλώματος, με την τιμή
# του αριθμητή της συνάρτησης μεταφοράς της προσέγγισης Chebyshev.
# Συνάρτηση μεταφοράς 4ης Βαθμίδας, Βαθυπερατού Κυκλώματος Sallen-Key σύμφωνα με τη
# Σχεδίαση ΙΙΙ (Ελάχιστης Ευαισθησίας):
# Από την ανάλυση με βάση τη σχεδίαση ΙΙΙ του κυκλώματος
# παίρνω για:
C_c2 := 0.86281
# και
k_c := 4/3
# παίρνω:
R_c2 := 0.69519
C_c3 := 3.42394
R_c1 := 0.52555
# καθώς και:
r_b := 3*r_a  # error: This variable is undefined.
H_C4(s) := k_c/(R_c1*R_c2*C_c3*C_c2)/(s^2 + s*(1/(R_c2*C_c3)) + 1/(R_c1*R_c2*C_c3*C_c2)) → 1.23532/(0.42012*s + s^2 + 0.92649)
B_2 := 1.23535
# Συνάρτηση Μεταφοράς του Συνολικού Κανονικοποιημένου Κυκλώματος:
H_CHEBcircuit(s) := 1/(R_c*C_c1)/(s + 1/(R_c*C_c1))*(-R_c/R_c)*(-0.74999*R_c/R_c)*k_c/(R_c1*R_c2*C_c3*C_c2)/(s^2 + s*(1/(R_c2*C_c3)) + 1/(R_c1*R_c2*C_c3*C_c2)) → 0.38922/((s + 0.42011)*(0.42012*s + s^2 + 0.92649))
# Πρόσθεσα τη Δεύτερη και τη Τρίτη βαθμίδα ώστε οι συναρτήσεις μεταφοράς της προσέγγισης και του κυκλώματος να έχουν και ίσους αριθμητές.
# Εναλλακτικά:
ω_oc1 := 1/(R_c*C_c1) → 0.42011
ω_oc2 := 1/(R_c2*C_c2*1.73205) → 0.96254
Q_c := C_c3/(1.73205*C_c2) → 2.29113
# 1.73205=(3)^(1/2)
H_ChebyshevCircuit(s) := ω_oc1/(s + ω_oc1)*(-R_c/R_c)*(-0.74999*R_c/R_c)*k_c*ω_oc2/(s^2 + s*(ω_oc2/Q_c) + ω_oc2) → 0.40437/((s + 0.42011)*(0.42012*s + s^2 + 0.96254))
# Β.2
Ω := 0, 0.001 .. 5
# Καμπύλη Λογαριθμικού Κέρδους της Κανονικοποιημένης Συνάρτησης Chebyshev και του
# Κανονικοποιημένου Κυκλώματος
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# Αποκανονικοποίηση Κυκλώματος Φίλτρου Chebyshev
# Ισχύει ότι R.n=10^4, καθώ και f.c=1.6*10^3 Ηz και ω.c=1.00531*10^4 rad/sec
R_C := R_c*R_n = 10000
R_C1 := R_c1*R_n = 5255.5
R_C2 := R_c2*R_n = 6951.9
C_C1 := C_c1/(ω_c*R_n) = 2.36776e-8
C_C2 := C_c2/(ω_c*R_n) = 8.58253e-9
C_C3 := C_c3/(ω_c*R_n) = 3.40586e-8
# Επίσης επιλέγω:
R_b := 10^4
# και
R_a := 3*R_b = 30000
# Συνάρτηση Μεταφοράς Αποκανονικοποιημένου Κυκλώματος
H_ChebyshevFilter(s) := 1/(R_C*C_C1)/(s + 1/(R_C*C_C1))*(-R_C/R_C)*(-0.74999*R_C/R_C)*k_c/(R_C1*R_C2*C_C3*C_C2)/(s^2 + s*(1/(R_C2*C_C3)) + 1/(R_C1*R_C2*C_C3*C_C2)) → 3.95456*10^11/((s + 4.2234*10^3)*(4.22348*10^3*s + s^2 + 9.36356*10^7))
f := 1, 10 .. 1000000
# Καμπύλη Λογαριθμικού Κέρδους του Αποκανονικοποιημένου Κυκλώματος
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# Προσομείωση Κυκλώματος Φίλτρου Chebyshev στο PsPice
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# Καμπύλη Λογαριθμικού Κέρδους Αποκανονικοποιημένου Κυκλώματος Φίλτρου Chebyshev στο PsPice
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